**
** ex03_display_fold.inp — Auto-generated by gen_ex03_inp.py
** 7-layer Display Panel: PET (J2) + PSA (Linear Viscoelastic)
** Hinge rotation driven via *RIGID BODY + *BOUNDARY
**
*HEADING
DISPLAY PANEL FOLDING ANALYSIS (ex03)
**
*NODE
0, -40.000000, 0.000000
1, -38.750000, 0.000000
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**
*ELEMENT, TYPE=CPE4, ELSET=PET_0
0, 0, 1, 102, 101
1, 1, 2, 103, 102
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**
*ELEMENT, TYPE=CPE4, ELSET=PSA_1
100, 101, 102, 203, 202
101, 102, 103, 204, 203
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**
*ELEMENT, TYPE=CPE4, ELSET=PET_2
200, 202, 203, 304, 303
201, 203, 204, 305, 304
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**
*ELEMENT, TYPE=CPE4, ELSET=PSA_3
300, 303, 304, 405, 404
301, 304, 305, 406, 405
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**
*ELEMENT, TYPE=CPE4, ELSET=PET_4
400, 404, 405, 506, 505
401, 405, 406, 507, 506
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**
*ELEMENT, TYPE=CPE4, ELSET=PSA_5
500, 505, 506, 607, 606
501, 506, 507, 608, 607
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**
*ELEMENT, TYPE=CPE4, ELSET=PET_6
600, 606, 607, 708, 707
601, 607, 608, 709, 708
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**
*MATERIAL, NAME=PET
*ELASTIC
4000.0, 0.3
*PLASTIC
80.0, 0.0
700.0, 1.0
**
*MATERIAL, NAME=PSA
*ELASTIC
10.0, 0.49
*VISCOELASTIC, TIME=PRONY
0.8, 0.0, 1.0
**
*SOLID SECTION, ELSET=PET_0, MATERIAL=PET
0.05,
*SOLID SECTION, ELSET=PSA_1, MATERIAL=PSA
0.05,
*SOLID SECTION, ELSET=PET_2, MATERIAL=PET
0.05,
*SOLID SECTION, ELSET=PSA_3, MATERIAL=PSA
0.05,
*SOLID SECTION, ELSET=PET_4, MATERIAL=PET
0.05,
*SOLID SECTION, ELSET=PSA_5, MATERIAL=PSA
0.05,
*SOLID SECTION, ELSET=PET_6, MATERIAL=PET
0.05,
**
*NSET, NSET=HINGE_L_SLAVES
0,
*NSET, NSET=HINGE_R_SLAVES
100,
**
*RIGID BODY, NSET=HINGE_L_SLAVES, REF NODE=99999
*RIGID BODY, NSET=HINGE_R_SLAVES, REF NODE=99998
**
*SURFACE, NAME=TOP_SURF, TYPE=NODE
10100, 10200
*SURFACE, NAME=BOT_SURF, TYPE=NODE
0, 100
*CONTACT PAIR, INTERACTION=FRICTIONLESS
TOP_SURF, BOT_SURF
**
*STEP, NLGEOM=YES
*STATIC
0.02, 1.0, 1e-5, 0.05
**
*BOUNDARY
99999, 1, 2, 0.0
*BOUNDARY
99998, 1, 2, 0.0
**
*END STEP
