**
** ex12_rigid_plate_display_fold.inp
** 90-degree folding with rigid plate + surface tie (High-Fidelity Mesh)
**
*HEADING
Display folding with rigid plate and tie constraints
**
*NODE
1, -40.000000, 0.000000
2, -39.750000, 0.000000
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**
*ELEMENT, TYPE=CPE4, ELSET=DISP_L01
1, 1, 2, 123, 122
2, 2, 3, 124, 123
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*ELEMENT, TYPE=CPE4, ELSET=DISP_L02
121, 122, 123, 244, 243
122, 123, 124, 245, 244
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*ELEMENT, TYPE=CPE4, ELSET=DISP_L03
241, 243, 244, 365, 364
242, 244, 245, 366, 365
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*ELEMENT, TYPE=CPE4, ELSET=DISP_L04
361, 364, 365, 486, 485
362, 365, 366, 487, 486
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*ELEMENT, TYPE=CPE4, ELSET=DISP_L05
481, 485, 486, 607, 606
482, 486, 487, 608, 607
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*ELEMENT, TYPE=CPE4, ELSET=DISP_L06
601, 606, 607, 728, 727
602, 607, 608, 729, 728
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*ELEMENT, TYPE=CPE4, ELSET=DISP_L07
721, 727, 728, 849, 848
722, 728, 729, 850, 849
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*ELEMENT, TYPE=CPE4, ELSET=DISP_L08
841, 848, 849, 970, 969
842, 849, 850, 971, 970
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*ELEMENT, TYPE=CPE4, ELSET=DISP_L09
961, 969, 970, 1091, 1090
962, 970, 971, 1092, 1091
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*ELEMENT, TYPE=CPE4, ELSET=DISP_L10
1081, 1090, 1091, 1212, 1211
1082, 1091, 1092, 1213, 1212
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*ELEMENT, TYPE=CPE4, ELSET=DISP_L11
1201, 1211, 1212, 1333, 1332
1202, 1212, 1213, 1334, 1333
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*ELEMENT, TYPE=CPE4, ELSET=DISP_L12
1321, 1332, 1333, 1454, 1453
1322, 1333, 1334, 1455, 1454
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*ELEMENT, TYPE=CPE4, ELSET=DISP_L13
1441, 1453, 1454, 1575, 1574
1442, 1454, 1455, 1576, 1575
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*ELEMENT, TYPE=CPE4, ELSET=DISP_L14
1561, 1574, 1575, 1696, 1695
1562, 1575, 1576, 1697, 1696
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*ELEMENT, TYPE=CPE4, ELSET=DISP_L15
1681, 1695, 1696, 1817, 1816
1682, 1696, 1697, 1818, 1817
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*ELEMENT, TYPE=CPE4, ELSET=DISP_L16
1801, 1816, 1817, 1938, 1937
1802, 1817, 1818, 1939, 1938
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*ELEMENT, TYPE=CPE4, ELSET=DISP_L17
1921, 1937, 1938, 2059, 2058
1922, 1938, 1939, 2060, 2059
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*ELEMENT, TYPE=CPE4, ELSET=DISP_L18
2041, 2058, 2059, 2180, 2179
2042, 2059, 2060, 2181, 2180
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*ELEMENT, TYPE=CPE4, ELSET=DISP_L19
2161, 2179, 2180, 2301, 2300
2162, 2180, 2181, 2302, 2301
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*ELEMENT, TYPE=CPE4, ELSET=DISP_L20
2281, 2300, 2301, 2422, 2421
2282, 2301, 2302, 2423, 2422
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*ELEMENT, TYPE=CPE4, ELSET=DISP_L21
2401, 2421, 2422, 2543, 2542
2402, 2422, 2423, 2544, 2543
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*ELEMENT, TYPE=CPE4, ELSET=DISP_L22
2521, 2542, 2543, 2664, 2663
2522, 2543, 2544, 2665, 2664
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*ELEMENT, TYPE=CPE4, ELSET=DISP_L23
2641, 2663, 2664, 2785, 2784
2642, 2664, 2665, 2786, 2785
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*ELEMENT, TYPE=CPE4, ELSET=DISP_L24
2761, 2784, 2785, 2906, 2905
2762, 2785, 2786, 2907, 2906
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*ELEMENT, TYPE=CPE4, ELSET=DISP_L25
2881, 2905, 2906, 3027, 3026
2882, 2906, 2907, 3028, 3027
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*ELEMENT, TYPE=CPE4, ELSET=DISP_L26
3001, 3026, 3027, 3148, 3147
3002, 3027, 3028, 3149, 3148
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*ELEMENT, TYPE=CPE4, ELSET=DISP_L27
3121, 3147, 3148, 3269, 3268
3122, 3148, 3149, 3270, 3269
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*ELEMENT, TYPE=CPE4, ELSET=DISP_L28
3241, 3268, 3269, 3390, 3389
3242, 3269, 3270, 3391, 3390
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*ELEMENT, TYPE=CPE4, ELSET=PLATE_LEFT
10000, 10001, 10002, 10033, 10032
10001, 10002, 10003, 10034, 10033
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*ELEMENT, TYPE=CPE4, ELSET=PLATE_RIGHT
10060, 10095, 10096, 10127, 10126
10061, 10096, 10097, 10128, 10127
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**
*MATERIAL, NAME=PET_1
*ELASTIC
4000.0, 0.3
*PLASTIC
80.0, 0.0
480.0, 1.0
**
*MATERIAL, NAME=PSA_1
*HYPERELASTIC, ARRUDA-BOYCE
0.16785, 3.0, 0.24000096000384002
*VISCOELASTIC, TIME=PRONY
0.2, 0.0, 3.33
*TRS, DEFINITION=WLF
25.0, 17.0, 51.6
**
*MATERIAL, NAME=PET_2
*ELASTIC
4000.0, 0.3
*PLASTIC
80.0, 0.0
480.0, 1.0
**
*MATERIAL, NAME=PSA_2
*HYPERELASTIC, ARRUDA-BOYCE
0.16785, 3.0, 0.24000096000384002
*VISCOELASTIC, TIME=PRONY
0.2, 0.0, 3.33
*TRS, DEFINITION=WLF
25.0, 17.0, 51.6
**
*MATERIAL, NAME=PET_3
*ELASTIC
4000.0, 0.3
*PLASTIC
80.0, 0.0
480.0, 1.0
**
*MATERIAL, NAME=PSA_3
*HYPERELASTIC, ARRUDA-BOYCE
0.16785, 3.0, 0.24000096000384002
*VISCOELASTIC, TIME=PRONY
0.2, 0.0, 3.33
*TRS, DEFINITION=WLF
25.0, 17.0, 51.6
**
*MATERIAL, NAME=PET_4
*ELASTIC
4000.0, 0.3
*PLASTIC
80.0, 0.0
480.0, 1.0
**
*MATERIAL, NAME=PSA_4
*HYPERELASTIC, ARRUDA-BOYCE
0.16785, 3.0, 0.24000096000384002
*VISCOELASTIC, TIME=PRONY
0.2, 0.0, 3.33
*TRS, DEFINITION=WLF
25.0, 17.0, 51.6
**
*MATERIAL, NAME=PET_5
*ELASTIC
4000.0, 0.3
*PLASTIC
80.0, 0.0
480.0, 1.0
**
*MATERIAL, NAME=PSA_5
*HYPERELASTIC, ARRUDA-BOYCE
0.16785, 3.0, 0.24000096000384002
*VISCOELASTIC, TIME=PRONY
0.2, 0.0, 3.33
*TRS, DEFINITION=WLF
25.0, 17.0, 51.6
**
*MATERIAL, NAME=PET_6
*ELASTIC
4000.0, 0.3
*PLASTIC
80.0, 0.0
480.0, 1.0
**
*MATERIAL, NAME=PSA_6
*HYPERELASTIC, ARRUDA-BOYCE
0.16785, 3.0, 0.24000096000384002
*VISCOELASTIC, TIME=PRONY
0.2, 0.0, 3.33
*TRS, DEFINITION=WLF
25.0, 17.0, 51.6
**
*MATERIAL, NAME=PET_7
*ELASTIC
4000.0, 0.3
*PLASTIC
80.0, 0.0
480.0, 1.0
**
*MATERIAL, NAME=PSA_7
*HYPERELASTIC, ARRUDA-BOYCE
0.16785, 3.0, 0.24000096000384002
*VISCOELASTIC, TIME=PRONY
0.2, 0.0, 3.33
*TRS, DEFINITION=WLF
25.0, 17.0, 51.6
**
*MATERIAL, NAME=STEEL
*ELASTIC
20000.0, 0.3
**
*SOLID SECTION, ELSET=DISP_L01, MATERIAL=PET_1
1.0,
*SOLID SECTION, ELSET=DISP_L02, MATERIAL=PET_1
1.0,
*SOLID SECTION, ELSET=DISP_L03, MATERIAL=PET_1
1.0,
*SOLID SECTION, ELSET=DISP_L04, MATERIAL=PSA_1
1.0,
*SOLID SECTION, ELSET=DISP_L05, MATERIAL=PET_2
1.0,
*SOLID SECTION, ELSET=DISP_L06, MATERIAL=PET_2
1.0,
*SOLID SECTION, ELSET=DISP_L07, MATERIAL=PET_2
1.0,
*SOLID SECTION, ELSET=DISP_L08, MATERIAL=PSA_2
1.0,
*SOLID SECTION, ELSET=DISP_L09, MATERIAL=PET_3
1.0,
*SOLID SECTION, ELSET=DISP_L10, MATERIAL=PET_3
1.0,
*SOLID SECTION, ELSET=DISP_L11, MATERIAL=PET_3
1.0,
*SOLID SECTION, ELSET=DISP_L12, MATERIAL=PSA_3
1.0,
*SOLID SECTION, ELSET=DISP_L13, MATERIAL=PET_4
1.0,
*SOLID SECTION, ELSET=DISP_L14, MATERIAL=PET_4
1.0,
*SOLID SECTION, ELSET=DISP_L15, MATERIAL=PET_4
1.0,
*SOLID SECTION, ELSET=DISP_L16, MATERIAL=PSA_4
1.0,
*SOLID SECTION, ELSET=DISP_L17, MATERIAL=PET_5
1.0,
*SOLID SECTION, ELSET=DISP_L18, MATERIAL=PET_5
1.0,
*SOLID SECTION, ELSET=DISP_L19, MATERIAL=PET_5
1.0,
*SOLID SECTION, ELSET=DISP_L20, MATERIAL=PSA_5
1.0,
*SOLID SECTION, ELSET=DISP_L21, MATERIAL=PET_6
1.0,
*SOLID SECTION, ELSET=DISP_L22, MATERIAL=PET_6
1.0,
*SOLID SECTION, ELSET=DISP_L23, MATERIAL=PET_6
1.0,
*SOLID SECTION, ELSET=DISP_L24, MATERIAL=PSA_6
1.0,
*SOLID SECTION, ELSET=DISP_L25, MATERIAL=PET_7
1.0,
*SOLID SECTION, ELSET=DISP_L26, MATERIAL=PET_7
1.0,
*SOLID SECTION, ELSET=DISP_L27, MATERIAL=PET_7
1.0,
*SOLID SECTION, ELSET=DISP_L28, MATERIAL=PSA_7
1.0,
*SOLID SECTION, ELSET=PLATE_LEFT, MATERIAL=STEEL
1.0,
*SOLID SECTION, ELSET=PLATE_RIGHT, MATERIAL=STEEL
1.0,
**
*NSET, NSET=DISP_BOT_L_NODES
1, 2, 3, 4, 5, 6
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*SURFACE, NAME=DISPLAY_BOT_L, TYPE=NODE
DISP_BOT_L_NODES,
*NSET, NSET=DISP_BOT_R_NODES
85, 86, 87, 88, 89, 90
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*SURFACE, NAME=DISPLAY_BOT_R, TYPE=NODE
DISP_BOT_R_NODES,
*NSET, NSET=PLATE_L_TOP_NODES
10063, 10064, 10065, 10066, 10067, 10068
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*SURFACE, NAME=PLATE_L_TOP, TYPE=NODE
PLATE_L_TOP_NODES,
*NSET, NSET=PLATE_R_TOP_NODES
10157, 10158, 10159, 10160, 10161, 10162
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*SURFACE, NAME=PLATE_R_TOP, TYPE=NODE
PLATE_R_TOP_NODES,
*NSET, NSET=PLATE_L_SLAVES
10001, 10002, 10003, 10004, 10005, 10006
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*NSET, NSET=PLATE_R_SLAVES
10095, 10096, 10097, 10098, 10099, 10100
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**
*RIGID BODY, NSET=PLATE_L_SLAVES, REF NODE=10000
*RIGID BODY, NSET=PLATE_R_SLAVES, REF NODE=10094
*TIE, NAME=TIE_LEFT
DISPLAY_BOT_L, PLATE_L_TOP
*TIE, NAME=TIE_RIGHT
DISPLAY_BOT_R, PLATE_R_TOP
**
*STEP
*STATIC
0.005, 1.0, 1e-05, 0.01
**
*BOUNDARY
10000, 1, 2, 0.0
10094, 1, 2, 0.0
**
*BOUNDARY
10000, 6, 6, -1.570796
10094, 6, 6, 1.570796
**
*END STEP
